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/BATCH
/COM,ANSYS RELEASE Release 17.0      BUILD 17.0      UP20151214       12:03:10
/input,menust,tmp,''
/GST,ON
/PLO,INFO,3
/GRO,CURL,ON
/CPLANE,1
WPSTYLE,,,,,,,,0
/POST1
FINISH
/SOL
FINISH
/POST1
FINISH
! /EXIT,NOSAV
/BATCH
/COM,ANSYS RELEASE Release 17.0      BUILD 17.0      UP20151214       12:17:27
/input,menust,tmp,''
/GST,ON
/PLO,INFO,3
/GRO,CURL,ON
/CPLANE,1
WPSTYLE,,,,,,,,0
/BATCH
/COM,ANSYS RELEASE Release 17.0      BUILD 17.0      UP20151214       12:47:24
/input,menust,tmp,''
/GST,ON
/PLO,INFO,3
/GRO,CURL,ON
/CPLANE,1
WPSTYLE,,,,,,,,0
/PREP7
/com,Curve Fitting Experimental Data Written To lab4_UNIA_1.exp
TBFT,EADD,1,UNIA,lab4_UNIA_1.exp
TBFT,FADD,1,HYPER,NEO,
TBFT,SOLVE,1,HYPER,NEO,,1
/BATCH
/COM,ANSYS RELEASE Release 17.0      BUILD 17.0      UP20151214       12:52:59
/input,menust,tmp,''
/GST,ON
/PLO,INFO,3
/GRO,CURL,ON
/CPLANE,1
WPSTYLE,,,,,,,,0
/PREP7
/com,Curve Fitting Experimental Data Written To lab4_UNIA_1.exp
TBFT,EADD,1,UNIA,lab4_UNIA_1.exp
TBFT,FADD,1,HYPER,NEO,
TBFT,SOLVE,1,HYPER,NEO,,1
/BATCH
/COM,ANSYS RELEASE Release 17.0      BUILD 17.0      UP20151214       12:54:17
/input,menust,tmp,''
/GST,ON
/PLO,INFO,3
/GRO,CURL,ON
/CPLANE,1
WPSTYLE,,,,,,,,0
/PREP7
/com,Curve Fitting Experimental Data Written To lab4_UNIA_1.exp
TBFT,EADD,1,UNIA,lab4_UNIA_1.exp
TBFT,FADD,1,HYPER,MOON,2
TBFT,SOLVE,1,HYPER,MOON,2,1
TBFT,FSET,1,HYPER,MOON,2
TBFT,FSET,1,HYPER,MOON,2
ET,1,PLANE182
lab4
/COM,ANSYS RELEASE Release 17.0      BUILD 17.0      UP20151214       13:10:18
/PREP7
lab4
/COM,ANSYS RELEASE Release 17.0      BUILD 17.0      UP20151214       13:14:10
lab4
/COM,ANSYS RELEASE Release 17.0      BUILD 17.0      UP20151214       13:14:41
lab4
/COM,ANSYS RELEASE Release 17.0      BUILD 17.0      UP20151214       13:16:20
/PREP7
/LIG,   1,1, 1.000,   0.00000000000    ,   0.00000000000    ,   0.00000000000    ,   0.00000000000
FLST,4,6,1
FITEM,4,2
FITEM,4,56
FITEM,4,57
FITEM,4,58
FITEM,4,59
FITEM,4,55
CP, ,ALL,P51X
lab4
/COM,ANSYS RELEASE Release 17.0      BUILD 17.0      UP20151214       13:21:57
cplist
lab4
/COM,ANSYS RELEASE Release 17.0      BUILD 17.0      UP20151214       13:26:00
/SOLU
FINISH
/POST1
SET,LIST,999
SET,,, ,,, ,15
PLDISP,2
/EXPAND,27,AXIS,,,10
PLDISP,2
ANDSCL,10,0.5
/EFACET,1
PLNSOL, S,INT, 0,1.0
/EFACET,1
PLNSOL, S,INT, 0,1.0
FINISH
/POST26
FILE,'lab4','rst','.'
NUMVAR,200
SOLU,191,NCMIT
STORE,MERGE
FILLDATA,191,,,,1,1
REALVAR,191,191
RFORCE,2,2,F,Y, FY_2
STORE,MERGE
NSOL,3,2,U,Y, UY_3,
STORE,MERGE
XVAR,3
PLVAR,2,
FILLDATA,192,,,,0,0
FILLDATA,193,,,,1,0
FILLDATA,194,,,,-1,0
FILLDATA,195,,,,1,1
VARNAME,195,NSET
!
! Name: U
! ID:  4
! Function: -{UY_3}
PROD,199,3,194
ADD,4,,199,,U
!
STORE,MERGE
XVAR,4
PLVAR,2,
XVAR,4
PLVAR,4,
XVAR,4
PLVAR,2,
XVAR,4
PLVAR,3,
XVAR,4
PLVAR,2,
XVAR,4
PLVAR,4,
XVAR,4
PLVAR,2,
XVAR,4
PLVAR,2,
FILLDATA,192,,,,0,0
FILLDATA,193,,,,1,0
FILLDATA,194,,,,-1,0
FILLDATA,195,,,,1,1
VARNAME,195,NSET
!
! Name: calc_5
! ID:  5
! Function: rforce(2 ,F,Y)*(-1)
RFORCE,200,2,F,Y
FILLDATA,198,,,,1,0
REALVAR,198,198
FILLDATA,197,,,,0,0
REALVAR,197,197
PROD,196,198,194
ADD,199,197,196
FILLDATA,197,,,,1,0
REALVAR,197,197
PROD,196,199,197
PROD,5,200,196,,calc_5
!
STORE,MERGE
FILLDATA,192,,,,0,0
FILLDATA,193,,,,1,0
FILLDATA,194,,,,-1,0
FILLDATA,195,,,,1,1
VARNAME,195,NSET
!
! Name: FY
! ID:  6
! Function: rforce(2 ,F,Y)*(-1)
RFORCE,200,2,F,Y
FILLDATA,198,,,,1,0
REALVAR,198,198
FILLDATA,197,,,,0,0
REALVAR,197,197
PROD,196,198,194
ADD,199,197,196
FILLDATA,197,,,,1,0
REALVAR,197,197
PROD,196,199,197
PROD,6,200,196,,FY
!
STORE,MERGE
VARDEL,5
XVAR,4
PLVAR,6,
/AXLAB,X,Displ, mm
/AXLAB,Y,Force, N
/GTHK,AXIS,2
/GRTYP,0
/GROPT,ASCAL,ON
/GROPT,LOGX,OFF
/GROPT,LOGY,OFF
/GROPT,AXDV,1
/GROPT,AXNM,ON
/GROPT,AXNSC,1,
/GROPT,DIG1,4,
/GROPT,DIG2,3,
/GROPT,XAXO,0,
/GROPT,YAXO,0,
/GROPT,DIVX,
/GROPT,DIVY,
/GROPT,REVX,0
/GROPT,REVY,0
/GROPT,LTYP,0
/XRANGE,DEFAULT
/YRANGE,DEFAULT,,1
XVAR,4
PLVAR,6,
lab4
/COM,ANSYS RELEASE Release 17.0      BUILD 17.0      UP20151214       13:42:11
FINISH
/POST1
/EFACET,1
PLNSOL, S,INT, 0,1.0
PLDISP,2
/EFACET,1
PLNSOL, S,INT, 0,1.0
/EFACET,1
PLNSOL, S,EQV, 0,1.0
FINISH
/POST26
NUMVAR,200
FILLDATA,191,,,,1,1
REALVAR,191,191
XVAR,5
PLVAR,5,
XVAR,5
PLVAR,3,
XVAR,5
PLVAR,2,
XVAR,3
PLVAR,2,
XVAR,5
PLVAR,2,
XVAR,3
PLVAR,2,
XVAR,5
PLVAR,2,
XVAR,3
PLVAR,2,
lab4
/COM,ANSYS RELEASE Release 17.0      BUILD 17.0      UP20151214       13:45:10
NUMVAR,200
FILLDATA,191,,,,1,1
REALVAR,191,191
XVAR,5
PLVAR,2,
lab4
/COM,ANSYS RELEASE Release 17.0      BUILD 17.0      UP20151214       13:46:32
NUMVAR,200
FILLDATA,191,,,,1,1
REALVAR,191,191
XVAR,5
PLVAR,2,
FINISH
/POST1
PLDISP,2
FINISH
/POST26
NUMVAR,200
FILLDATA,191,,,,1,1
REALVAR,191,191
FILLDATA,192,,,,0,0
FILLDATA,193,,,,1,0
FILLDATA,194,,,,-1,0
FILLDATA,195,,,,1,1
VARNAME,195,NSET
!
! Name: calc_4
! ID:  4
! Function: -{UY_3}
PROD,199,3,194
ADD,4,,199,,calc_4
!
STORE,MERGE
XVAR,5
PLVAR,4,
XVAR,3
PLVAR,4,
PRVAR,4,
XVAR,5
PLVAR,4,
XVAR,2
PLVAR,5,
XVAR,2
PLVAR,4,
XVAR,2
PLVAR,4,
XVAR,2
PLVAR,3,
XVAR,2
PLVAR,5,
VARDEL,4
VARDEL,5
XVAR,2
PLVAR,3,
FINISH
! /EXIT,NOSAV
/BATCH
/COM,ANSYS RELEASE Release 17.0      BUILD 17.0      UP20151214       13:51:39
/input,menust,tmp,''
/GST,ON
/PLO,INFO,3
/GRO,CURL,ON
/CPLANE,1
WPSTYLE,,,,,,,,0
lab4
/COM,ANSYS RELEASE Release 17.0      BUILD 17.0      UP20151214       13:57:54
/RGB,INDEX,100,100,100, 0
/RGB,INDEX,100,100,100, 0
/RGB,INDEX, 0, 0, 0,15
FINISH
/SOL
FINISH
/POST1
PLDISP,2
/EXPAND,27,AXIS,,,10
/EFACET,1
PLNSOL, S,INT, 0,1.0
/EFACET,1
PLNSOL, S,EQV, 0,1.0
FINISH
! /EXIT,NOSAV
/BATCH
/COM,ANSYS RELEASE Release 17.0      BUILD 17.0      UP20151214       08:47:39
/input,menust,tmp,''
/GST,ON
/PLO,INFO,3
/GRO,CURL,ON
/CPLANE,1
WPSTYLE,,,,,,,,0
/PREP7
/NOPR
KEYW,PR_SET,1
KEYW,PR_STRUC,1
KEYW,PR_THERM,0
KEYW,PR_FLUID,0
KEYW,PR_ELMAG,0
KEYW,MAGNOD,0
KEYW,MAGEDG,0
KEYW,MAGHFE,0
KEYW,MAGELC,0
KEYW,PR_MULTI,0
/GO
/COM,
/COM,Preferences for GUI filtering have been set to display:
/COM,  Structural
*SET,a,0.05
*SET,b,0.002
*SET,c,0.002
*SET,d,0.005
*SET,h,0.005
*SET,r,0.003
*SET,e,1.5e11
*SET,mu,0.05
*SET,ro,8000
ET,1,PLANE182
ET,2,SOLID185
MPTEMP,,,,,,,,
MPTEMP,1,0
MPDATA,EX,1,,e
MPDATA,PRXY,1,,mu
MPTEMP,,,,,,,,
MPTEMP,1,0
MPDATA,DENS,1,,ro
K,1,c/2,-d,0,
K,2,c/2,0,0,
K,1,c/2,-d,0,
K,3,c/2,b,0,
K,4,c/2,b+r,0,
K,5,c/2+r,b+r,0,
K,6,c/2+r+b,b+r,0,
K,7,c/2+r,b+r+a,0,
K,8,c/2+r+b,b+r+a,0,
FLST,3,8,3,ORDE,2
FITEM,3,1
FITEM,3,-8
KSYMM,X,P51X, , , ,0,0
L,       5,       6
L,       6,       8
L,       8,       7
L,       7,       5
L,      13,      14
L,      14,      16
L,      16,      15
L,      15,      13
L,       9,       1
L,       1,       2
L,       2,      10
L,      10,       9
L,      11,      10
L,      11,       3
L,       3,       2
GPLOT
LARC,3,5,4,r,
LARC,2,6,4,r+b,
LARC,10,14,12,r+b,
LARC,11,13,12,r,
FLST,2,4,4
FITEM,2,10
FITEM,2,11
FITEM,2,12
FITEM,2,9
AL,P51X
FLST,2,4,4
FITEM,2,15
FITEM,2,11
FITEM,2,13
FITEM,2,14
AL,P51X
FLST,2,4,4
FITEM,2,16
FITEM,2,15
FITEM,2,17
FITEM,2,1
AL,P51X
FLST,2,4,4
FITEM,2,13
FITEM,2,19
FITEM,2,5
FITEM,2,18
AL,P51X
FLST,2,4,4
FITEM,2,5
FITEM,2,8
FITEM,2,7
FITEM,2,6
AL,P51X
FLST,2,4,4
FITEM,2,1
FITEM,2,2
FITEM,2,3
FITEM,2,4
AL,P51X
FLST,5,6,5,ORDE,2
FITEM,5,1
FITEM,5,-6
CM,_Y,AREA
ASEL, , , ,P51X
CM,_Y1,AREA
CMSEL,S,_Y
CMSEL,S,_Y1
AATT,       1, ,   1,       0,
CMSEL,S,_Y
CMDELE,_Y
CMDELE,_Y1
FLST,5,4,4,ORDE,4
FITEM,5,2
FITEM,5,4
FITEM,5,6
FITEM,5,8
CM,_Y,LINE
LSEL, , , ,P51X
CM,_Y1,LINE
CMSEL,,_Y
LESIZE,_Y1, , ,30, , , , ,1
FLST,5,6,4,ORDE,4
FITEM,5,10
FITEM,5,12
FITEM,5,16
FITEM,5,-19
CM,_Y,LINE
LSEL, , , ,P51X
CM,_Y1,LINE
CMSEL,,_Y
LESIZE,_Y1, , ,8, , , , ,1
FLST,5,6,4,ORDE,5
FITEM,5,1
FITEM,5,5
FITEM,5,11
FITEM,5,13
FITEM,5,-15
CM,_Y,LINE
LSEL, , , ,P51X
CM,_Y1,LINE
CMSEL,,_Y
LESIZE,_Y1, , ,4, , , , ,1
FLST,5,1,4,ORDE,1
FITEM,5,9
CM,_Y,LINE
LSEL, , , ,P51X
CM,_Y1,LINE
CMSEL,,_Y
LESIZE,_Y1, , ,4, , , , ,1
MSHAPE,0,2D
MSHKEY,1
FLST,5,6,5,ORDE,2
FITEM,5,1
FITEM,5,-6
CM,_Y,AREA
ASEL, , , ,P51X
CM,_Y1,AREA
CHKMSH,'AREA'
CMSEL,S,_Y
AMESH,_Y1
CMDELE,_Y
CMDELE,_Y1
CMDELE,_Y2
SAVE
TYPE,   2
EXTOPT,ESIZE,5,0,
EXTOPT,ACLEAR,0
EXTOPT,ATTR,0,0,0
MAT,1
REAL,_Z4
ESYS,0
FLST,2,6,5,ORDE,2
FITEM,2,1
FITEM,2,-6
VEXT,P51X, , ,0,0,h,,,,
FINISH
/SOL
NSEL,S,LOC,Y,-d
NPLOT
FLST,2,30,1,ORDE,14
FITEM,2,1
FITEM,2,14
FITEM,2,22
FITEM,2,-24
FITEM,2,446
FITEM,2,459
FITEM,2,467
FITEM,2,-469
FITEM,2,491
FITEM,2,-494
FITEM,2,499
FITEM,2,-502
FITEM,2,507
FITEM,2,-518
/GO
D,P51X, , , , , ,ALL, , , , ,
ALLSEL,ALL
GPLOT
ANTYPE,2
MODOPT,LANB,10
EQSLV,SPAR
MXPAND,10, , ,0
LUMPM,0
PSTRES,0
MODOPT,LANB,10,0,10000, ,OFF
/STATUS,SOLU
SOLVE
FINISH
/POST1
SET,LIST,999
SET,,, ,,, ,1
PLDISP,1
PLDISP,1
PLDI, ,
ANMODE,5,0.1, ,0
SET,LIST,999
SET,,, ,,, ,5
PLDI, ,
ANMODE,5,0.1, ,0
SET,LIST,999
SET,,, ,,, ,10
PLDI, ,
ANMODE,5,0.1, ,0
PLDI, ,
ANMODE,5,0.1, ,0
*SET,p,1000
GPLOT
FINISH
/PREP7
FINISH
/SOL
FLST,2,2,5,ORDE,2
FITEM,2,26
FITEM,2,30
/GO
SFA,P51X,1,PRES,p
/STATUS,SOLU
SOLVE
FINISH
/POST1
PLDISP,1
PLDISP,1
PLDI, ,
ANMODE,5,0.1, ,0
SET,LIST,999
FINISH
/PREP7
FINISH
/SOL
SBCTRAN
/PSF,PRES,NORM,2,0,1
/PBF,DEFA, ,1
/PSYMB,CS,0
/PSYMB,NDIR,0
/PSYMB,ESYS,0
/PSYMB,LDIV,0
/PSYMB,LDIR,0
/PSYMB,ADIR,0
/PSYMB,ECON,0
/PSYMB,XNODE,0
/PSYMB,DOT,1
/PSYMB,PCONV,
/PSYMB,LAYR,0
/PSYMB,FBCS,0
/PBC,ALL, ,1
ANTYPE,0
/STATUS,SOLU
SOLVE
FINISH
/POST1
PLDISP,1
PLDISP,1
PLDI, ,
ANMODE,5,0.1, ,0
PLDI, ,
ANMODE,50,0.1, ,0
FINISH
! /EXIT,NOSAV
/BATCH
/COM,ANSYS RELEASE Release 17.0      BUILD 17.0      UP20151214       10:20:19
/input,menust,tmp,''
/GST,ON
/PLO,INFO,3
/GRO,CURL,ON
/CPLANE,1
WPSTYLE,,,,,,,,0
/NOPR
KEYW,PR_SET,1
KEYW,PR_STRUC,1
KEYW,PR_THERM,0
KEYW,PR_FLUID,0
KEYW,PR_ELMAG,0
KEYW,MAGNOD,0
KEYW,MAGEDG,0
KEYW,MAGHFE,0
KEYW,MAGELC,0
KEYW,PR_MULTI,0
/GO
/COM,
/COM,Preferences for GUI filtering have been set to display:
/COM,  Structural
*SET,m,50
*SET,c,1.1e3
*SET,l,0.2
*SET,f0,1000
*SET,C        , 1000
*SET,k,1e5
/PREP7
ET,1,MASS21
ET,2,COMBIN14
KEYOPT,1,1,0
KEYOPT,1,2,0
KEYOPT,1,3,4
KEYOPT,2,1,0
KEYOPT,2,2,1
KEYOPT,2,3,0
R,1,m,
R,2,k,c, , , , ,
RMORE, ,
N,1,0,0,0,,,,
N,2,l,0,0,,,,
N,3,2*l,0,0,,,,
TYPE,   1
MAT,
REAL,       1
ESYS,       0
SECNUM,
TSHAP,LINE
E,       2
E,       3
TYPE,   2
MAT,
REAL,       2
ESYS,       0
SECNUM,
TSHAP,LINE
E,       1
FLST,2,2,1
FITEM,2,1
FITEM,2,2
E,P51X
FLST,2,2,1
FITEM,2,2
FITEM,2,3
E,P51X
/SHRINK,0
/ESHAPE,1.0
/EFACET,1
/RATIO,1,1,1
/CFORMAT,32,0
/SHRINK,0
/ESHAPE,1
/EFACET,1
/RATIO,1,1,1
/CFORMAT,32,0
GPLOT
FINISH
/SOL
FLST,2,1,1,ORDE,1
FITEM,2,1
/GO
D,P51X, , , , , ,ALL, , , , ,
ANTYPE,2
MODOPT,LANB,4
EQSLV,SPAR
MXPAND,4, , ,0
LUMPM,0
PSTRES,0
MODOPT,LANB,4,0,10000, ,OFF
/STATUS,SOLU
SOLVE
FINISH
/POST1
SET,LIST,999
SET,,, ,,, ,3
PLDISP,1
PLDISP,1
PLDI, ,
ANMODE,5,0.1, ,0
SET,LIST,999
SET,,, ,,, ,4
PLDISP,1
PLDI, ,
ANMODE,5,0.1, ,0
GPLOT
FINISH
/SOL
FLST,2,1,1,ORDE,1
FITEM,2,3
/GO
F,P51X,FX,f0
FLST,2,1,1,ORDE,1
FITEM,2,3
FDELE,P51X,ALL
FLST,2,1,1,ORDE,1
FITEM,2,2
/GO
F,P51X,FX,f0
ANTYPE,3
HROPT,FULL
HROUT,ON
LUMPM,0
OUTPR,BASIC,LAST,
HARFRQ,0,15,
NSUBST,20,
KBC,1
/STATUS,SOLU
SOLVE
FINISH
/POST26
FILE,'lab4','rst','.'
NUMVAR,200
SOLU,191,NCMIT
STORE,MERGE
PLCPLX,0
PRCPLX,1
FILLDATA,191,,,,1,1
REALVAR,191,191
NSOL,2,2,U,X,UX_2,
STORE,MERGE
XVAR,1
PLVAR,2,
GPLOT
FINISH
/PREP7
N,4,3*l,0,0,,,,
*SET,m1,100
*SET,c1,2e3
*SET,k1,2e5
R,3,m1,
R,4,k1,c1, , , , ,
RMORE, ,
FLST,2,2,1
FITEM,2,3
FITEM,2,4
E,P51X
GPLOT
EDELE,       5
GPLOT
TYPE,   2
MAT,
REAL,       4
ESYS,       0
SECNUM,
TSHAP,LINE
FLST,2,2,1
FITEM,2,3
FITEM,2,4
E,P51X
TYPE,   1
MAT,
REAL,       3
ESYS,       0
SECNUM,
TSHAP,LINE
E,       4
GPLOT
FINISH
/SOL
/STATUS,SOLU
SOLVE
FINISH
/POST26
FILE,'lab4','rst','.'
NUMVAR,200
SOLU,191,NCMIT
STORE,MERGE
PLCPLX,0
PRCPLX,1
FILLDATA,191,,,,1,1
REALVAR,191,191
FINISH
/SOL
ANTYPE,2
/STATUS,SOLU
SOLVE
MODOPT,LANB,6
EQSLV,SPAR
MXPAND,6, , ,0
LUMPM,0
PSTRES,0
MODOPT,LANB,6,0,10000, ,OFF
/STATUS,SOLU
SOLVE
FINISH
/POST26
FILE,'lab4','rst','.'
NUMVAR,200
SOLU,191,NCMIT
STORE,MERGE
FILLDATA,191,,,,1,1
REALVAR,191,191
FINISH
/POST1
PLDISP,1
PLDISP,1
SET,LIST,999
SET,,, ,,, ,4
PLDI, ,
ANMODE,5,0.1, ,0
PLDI, ,
ANMODE,50,0.1, ,0
SET,LIST,999
SET,,, ,,, ,6
PLDI, ,
ANMODE,50,0.1, ,0
SET,LIST,999
SET,LIST,999
GPLOT
FINISH
! /EXIT,NOSAV
/BATCH
/COM,ANSYS RELEASE Release 17.0      BUILD 17.0      UP20151214       11:08:18
/input,menust,tmp,''
/GST,ON
/PLO,INFO,3
/GRO,CURL,ON
/CPLANE,1
WPSTYLE,,,,,,,,0
/NOPR
KEYW,PR_SET,1
KEYW,PR_STRUC,1
KEYW,PR_THERM,0
KEYW,PR_FLUID,0
KEYW,PR_ELMAG,0
KEYW,MAGNOD,0
KEYW,MAGEDG,0
KEYW,MAGHFE,0
KEYW,MAGELC,0
KEYW,PR_MULTI,0
/GO
/COM,
/COM,Preferences for GUI filtering have been set to display:
/COM,  Structural
*SET,f0,1000
*SET,m,50
*SET,k,1e5
*SET,l,1
/PREP7
ET,1,MASS21
ET,2,COMBIN14
KEYOPT,1,1,0
KEYOPT,1,2,0
KEYOPT,1,3,4
KEYOPT,2,1,0
KEYOPT,2,2,2
KEYOPT,2,3,0
R,1,m,
R,2,k, , , , , ,
RMORE, ,
N,1,0,0,0,,,,
N,2,0,l,0,,,,
TYPE,   1
MAT,
REAL,       1
ESYS,       0
SECNUM,
TSHAP,LINE
E,       2
TYPE,   2
MAT,
REAL,       2
ESYS,       0
SECNUM,
TSHAP,LINE
FLST,2,2,1
FITEM,2,1
FITEM,2,2
E,P51X
GPLOT
/SHRINK,0
/ESHAPE,1.0
/EFACET,1
/RATIO,1,1,1
/CFORMAT,32,0
FINISH
/SOL
ANTYPE,2
FINISH
/PREP7
FINISH
/SOL
FLST,2,1,1,ORDE,1
FITEM,2,1
/GO
D,P51X, , , , , ,ALL, , , , ,
FLST,2,1,1,ORDE,1
FITEM,2,2
/GO
F,P51X,FY,f0
FLST,2,1,1,ORDE,1
FITEM,2,2
FDELE,P51X,ALL
FLST,2,1,1,ORDE,1
FITEM,2,2
/GO
F,P51X,FY,-f0
ANTYPE,2
MODOPT,LANB,2
EQSLV,SPAR
MXPAND,2, , ,0
LUMPM,0
PSTRES,0
MODOPT,LANB,2,0,10000, ,OFF
FINISH
/PREP7
FINISH
/SOL
/STATUS,SOLU
SOLVE
FINISH
/POST1
SET,LIST,999
SET,,, ,,, ,2
PLDISP,1
FINISH
/SOL
ANTYPE,3
OUTPR,ESOL,LAST,
HARFRQ,0,10,
NSUBST,20,
KBC,1
/STATUS,SOLU
SOLVE
FINISH
/POST1
FINISH
/POST26
FILE,'lab4','rst','.'
NUMVAR,200
SOLU,191,NCMIT
STORE,MERGE
PLCPLX,0
PRCPLX,1
FILLDATA,191,,,,1,1
REALVAR,191,191
NSOL,2,2,U,Y,UY_2,
STORE,MERGE
XVAR,1
PLVAR,2,
FINISH
! /EXIT,NOSAV
